# Attitude Estimation by using 3-Axis Rate-Gyro
# Background: | By: Guy Soffer
# - 'dt' should be very small in order to achive higher numerical accuracy (Not related to sampeling rate).
# - Rotation direction sign is derived by the right hand rule.
# - The new State-Matrix is solved by multiplying the State-Matrix by the Delta-Matrix (R_new = R^.W)
# Roll - ϕ- Phi - Gx
# Pitch - θ- Theta - Gy
# Yaw - ψ - psi - Gz
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# Init Conditions:
ω_x := 0
ω_y := π/2
ω_z := 0
ϕ := 0
θ := 0
ψ := 0
A := [0, 0, 9.8]
# Delta-Matrix (Build from the Gyros measurements):
M_ω(dt) := [1, -ω_z*dt, ω_y*dt; ω_z*dt, 1, -ω_x*dt; -ω_y*dt, ω_x*dt, 1]
# State-Matrix - First the DCM matrix is built from init conditions (ψ, θ, ϕ):
DCM_R := [
    cos(θ)*cos(ψ), sin(ϕ)*sin(θ)*cos(ψ) - cos(ϕ)*sin(ψ), cos(ϕ)*sin(θ)*cos(ψ) + sin(ϕ)*sin(ψ);
    cos(θ)*sin(ψ), sin(ϕ)*sin(θ)*sin(ψ) + cos(ϕ)*cos(ψ), cos(ϕ)*sin(θ)*sin(ψ) - sin(ϕ)*cos(ψ);
    -sin(θ), sin(ϕ)*cos(θ), cos(ϕ)*cos(θ)
]
DCM_R = [1, 0, 0; 0, 1, 0; 0, 0, 1]  # Init value of State-Matrix
# Integration (of angular velocities):
ROT(R, W, N) :=
    for i ∈ 0 .. N
        R ← R*W
    return R
# R is the State-Matrix.
# W is the Delta-Matrix.
# N is the number of iterations.
# Result:
A*ROT(DCM_R, M_ω(0.1), 10) = [-11.0914, 0, -1.59782]
# Notice that as 'dt' becomes smaller the accuracy increases, even with constant omega values.
# This isn't a bandwidth issue. Is it a numerical approximation problem.
A*ROT(DCM_R, M_ω(0.01), 100) = [-9.92166, 0, -0.154567]
A*ROT(DCM_R, M_ω(0.001), 1000) = [-9.8121, 0, -0.0154001]
A*ROT(DCM_R, M_ω(0.0001), 10000) = [-9.80121, 0, -0.00153944]
